OpenVSP model (file version 4), 13 components.
Geometry view with OpenVSP parameter names; values to 6 digits, angles in degrees, lengths in the model's unit.

Wing "WingGeom"
  location (X Y Z) 0 0 0, rotation 0 0 0
  symmetric about XZ
  bounding box size 1.29159 22.0876 0.273681
  totals: TotalSpan=22.0876 TotalProjectedSpan=22.0876 TotalArea=23.436
  root: chord 1.27708, twist 0, NACA 4-series Camber=0 CamberLoc=0.2 ThickChord=0.1
  sections:
    n  Span     Root_Chord  Tip_Chord  Area      Sweep  Sweep_Location  Dihedral  Twist  Twist_Location  tip airfoil
    1  5.50761  1.27708     1.05959    6.43475   2      0               0         0      0.25            as above
    2  3        1.05959     1.00632    3.09886   1.5    0               0         0      0.25            as above
    3  1.5      1.00632     0.98142    1.4908    1.5    0               0         0      0.25            NACA 4-series Camber=0 CamberLoc=0 ThickChord=0.083333
    4  1.03618  0.98142     0.357278   0.693563  30     0               0         0      0.25            as above

Fuselage "FuselageLeft", child of "WingGeom"
  location (X Y Z) -0.76087 -2.5 -0.326087, rotation 0 0 0
  bounding box size 2.56818 0.676787 0.742407
  Design: Length=2.56818
  cross sections:
    n  XLocPercent  YLocPercent  ZLocPercent  shape
    0  0            0            -0.01087     point
    1  0.131086     0            0            super ellipse Super_Height=0.424432 Super_M=2 Super_N=1.50909 Super_Width=0.244318
    2  0.430711     0            0            ellipse Ellipse_Height=0.742407 Ellipse_Width=0.676787
    3  0.816399     0            0            ellipse Ellipse_Height=0.738636 Ellipse_Width=0.295455
    4  1            0            0.137051     point

Fuselage "Body", child of "FuselageLeft"
  location (X Y Z) 0 -2.5 0, rotation 0 0 0
  bounding box size 5.45455 0.1 0.1
  Design: Length=5.45455
  cross sections:
    n  XLocPercent  YLocPercent  ZLocPercent  shape
    0  0            0            0            point
    1  0.097826     0            0            ellipse Ellipse_Height=0.1 Ellipse_Width=0.1
    2  0.897034     0            0            as above
    3  1            0            0            point

Wing "Tail", child of "Body"
  location (X Y Z) 4 2.5 0, rotation -30 0 0
  symmetric about XZ
  bounding box size 0.76087 7.41021 0.806969
  totals: TotalSpan=2.70438 TotalProjectedSpan=2.70438 TotalArea=1.9107
  root: chord 0.76087, twist 0, NACA 4-series Camber=0 CamberLoc=0.2 ThickChord=0.1
  sections:
    n  Span     Root_Chord  Tip_Chord  Area      Sweep  Sweep_Location  Dihedral  Twist  Twist_Location  tip airfoil
    1  1.35219  0.76087     0.652174   0.955352  0      0               0         0      0.25            as above

Wing "Prop", child of "Tail"
  location (X Y Z) 5.42857 2.5 0, rotation 0 -10 0; relative location 1.42857 0 0, rotation 0 -10 0
  symmetric about XZ
  3 copies around X
  bounding box size 0.073861 1.06616 0.938485
  totals: TotalSpan=1.06616 TotalProjectedSpan=1.06616 TotalArea=0.066635
  root: chord 0.075, twist 0, NACA 4-series Camber=0 CamberLoc=0.2 ThickChord=0.095833
  sections:
    n  Span     Root_Chord  Tip_Chord  Area      Sweep  Sweep_Location  Dihedral  Twist  Twist_Location  tip airfoil
    1  0.53308  0.075       0.05       0.033317  0      0.15            0         45     0.5             NACA 4-series Camber=0 CamberLoc=0.2 ThickChord=0.1

Fuselage "FuselageCenter", child of "WingGeom"
  location (X Y Z) -0.978261 0 -0.326087, rotation 0 0 0
  bounding box size 2.56818 0.676787 0.742407
  Design: Length=2.56818
  cross sections:
    n  XLocPercent  YLocPercent  ZLocPercent  shape
    0  0            0            -0.01087     point
    1  0.131086     0            0            super ellipse Super_Height=0.424432 Super_M=2 Super_N=1.50909 Super_Width=0.244318
    2  0.430711     0            0            ellipse Ellipse_Height=0.742407 Ellipse_Width=0.676787
    3  0.816399     0            0            ellipse Ellipse_Height=0.738636 Ellipse_Width=0.295455
    4  1            0            0.137051     point

Fuselage "FuselageRight", child of "WingGeom"
  location (X Y Z) -0.76087 2.5 -0.326087, rotation 0 0 0
  bounding box size 2.56818 0.676787 0.742407
  Design: Length=2.56818
  cross sections:
    n  XLocPercent  YLocPercent  ZLocPercent  shape
    0  0            0            -0.01087     point
    1  0.131086     0            0            super ellipse Super_Height=0.424432 Super_M=2 Super_N=1.50909 Super_Width=0.244318
    2  0.430711     0            0            ellipse Ellipse_Height=0.742407 Ellipse_Width=0.676787
    3  0.816399     0            0            ellipse Ellipse_Height=0.738636 Ellipse_Width=0.295455
    4  1            0            0.137051     point

Fuselage "Body", child of "FuselageRight"
  location (X Y Z) 0 2.5 0, rotation 0 0 0
  bounding box size 5.45455 0.1 0.1
  Design: Length=5.45455
  cross sections:
    n  XLocPercent  YLocPercent  ZLocPercent  shape
    0  0            0            0            point
    1  0.097826     0            0            ellipse Ellipse_Height=0.1 Ellipse_Width=0.1
    2  0.897034     0            0            as above
    3  1            0            0            point

Wing "Tail", child of "Body"
  location (X Y Z) 4 -2.5 0, rotation -30 0 0
  symmetric about XZ
  bounding box size 0.76087 5.08355 0.806969
  totals: TotalSpan=2.70438 TotalProjectedSpan=2.70438 TotalArea=1.9107
  root: chord 0.76087, twist 0, NACA 4-series Camber=0 CamberLoc=0.2 ThickChord=0.1
  sections:
    n  Span     Root_Chord  Tip_Chord  Area      Sweep  Sweep_Location  Dihedral  Twist  Twist_Location  tip airfoil
    1  1.35219  0.76087     0.652174   0.955352  0      0               0         0      0.25            as above

Wing "Prop", child of "Tail"
  location (X Y Z) 5.42857 -2.5 0, rotation 0 -10 0; relative location 1.42857 0 0, rotation 0 -10 0
  symmetric about XZ
  3 copies around X
  bounding box size 0.073861 1.06616 0.938485
  totals: TotalSpan=1.06616 TotalProjectedSpan=1.06616 TotalArea=0.066635
  root: chord 0.075, twist 0, NACA 4-series Camber=0 CamberLoc=0.2 ThickChord=0.095833
  sections:
    n  Span     Root_Chord  Tip_Chord  Area      Sweep  Sweep_Location  Dihedral  Twist  Twist_Location  tip airfoil
    1  0.53308  0.075       0.05       0.033317  0      0.15            0         45     0.5             NACA 4-series Camber=0 CamberLoc=0.2 ThickChord=0.1

Fuselage "Body"
  location (X Y Z) 0 0 0, rotation 0 0 0
  bounding box size 5.45455 0.1 0.1
  Design: Length=5.45455
  cross sections:
    n  XLocPercent  YLocPercent  ZLocPercent  shape
    0  0            0            0            point
    1  0.097826     0            0            ellipse Ellipse_Height=0.1 Ellipse_Width=0.1
    2  0.897034     0            0            as above
    3  1            0            0            point

Wing "Tail", child of "Body"
  location (X Y Z) 4 0 0, rotation -30 0 0
  symmetric about XZ
  bounding box size 0.76087 2.41021 0.806969
  totals: TotalSpan=2.70438 TotalProjectedSpan=2.70438 TotalArea=1.9107
  root: chord 0.76087, twist 0, NACA 4-series Camber=0 CamberLoc=0.2 ThickChord=0.1
  sections:
    n  Span     Root_Chord  Tip_Chord  Area      Sweep  Sweep_Location  Dihedral  Twist  Twist_Location  tip airfoil
    1  1.35219  0.76087     0.652174   0.955352  0      0               0         0      0.25            as above

Wing "Prop", child of "Tail"
  location (X Y Z) 5.2381 0 0, rotation 0 -10 0
  symmetric about XZ
  3 copies around X
  bounding box size 0.073861 1.06616 0.938485
  totals: TotalSpan=1.06616 TotalProjectedSpan=1.06616 TotalArea=0.066635
  root: chord 0.075, twist 0, NACA 4-series Camber=0 CamberLoc=0.2 ThickChord=0.095833
  sections:
    n  Span      Root_Chord  Tip_Chord  Area      Sweep  Sweep_Location  Dihedral  Twist  Twist_Location  tip airfoil
    1  0.533079  0.075       0.05       0.033317  0      0.15            0         45     0.5             NACA 4-series Camber=0 CamberLoc=0.2 ThickChord=0.1
